// SBML level 3 version 2

model Simple_Menten()

  // Compartments:
  compartment Tube = 10 u0;

  // Species:
  species $Protein in Tube = 100;  // substance in u2
  species Substrate in Tube = 10;  // substance in u1
  species Product in Tube = 0;  // substance in u1

  // Parameters:
  Km = 50 u1;
  kcat = 1 u3;

  // Reactions:
  Reaction: Substrate => Product; kcat*Protein*Substrate/(Km + Substrate);  // modifiers: Protein

  // Unit definitions:
  unit u0 = 1e-3 litre; u0 is "ml";
  unit u1 = 1e-3 mole / (10 litre); u1 is "mmole / l";
  unit u2 = 1e-6 mole / (10 litre); u2 is "umole / l";
  unit u3 = 1 / (10 second); u3 is "1 / s";
  unit u4 = 10 second; u4 is "s";
end
